new fuse.C4_ln6201670-1       line.C4_ln6201670-1  1 fusecurve=tlink  ratedcurrent=10
new fuse.C4_ln6409873-1       line.C4_ln6409873-1  1 fusecurve=tlink  ratedcurrent=10
new fuse.C4_ln6260017-1       line.C4_ln6260017-1  1 fusecurve=tlink  ratedcurrent=10
new fuse.C4_ln5985355-3       line.C4_ln5985355-3  1 fusecurve=tlink  ratedcurrent=10
new fuse.C4_ln5895802-1       line.C4_ln5895802-1  1 fusecurve=tlink  ratedcurrent=10
new fuse.C4_ln5804798-3       line.C4_ln5804798-3  1 fusecurve=tlink  ratedcurrent=10
new fuse.C4_ln5898058-2       line.C4_ln5898058-2  1 fusecurve=tlink  ratedcurrent=10
new fuse.C4_ln5986923-1       line.C4_ln5986923-1  1 fusecurve=tlink  ratedcurrent=10
new fuse.C4_ln5712587-2       line.C4_ln5712587-2  1 fusecurve=tlink  ratedcurrent=10
new fuse.C4_ln6106583-5       line.C4_ln6106583-5  1 fusecurve=tlink  ratedcurrent=10
new fuse.C4_ln6292464-1       line.C4_ln6292464-1  1 fusecurve=tlink  ratedcurrent=10
new fuse.C4_ln6229831-1       line.C4_ln6229831-1  1 fusecurve=tlink  ratedcurrent=10
new fuse.C4_ln5744326-1       line.C4_ln5744326-1  1 fusecurve=tlink  ratedcurrent=10
new fuse.C4_ln5774470-2       line.C4_ln5774470-2  1 fusecurve=tlink  ratedcurrent=10
new fuse.C4_ln6505944-3       line.C4_ln6505944-3  1 fusecurve=tlink  ratedcurrent=10
new fuse.C4_ln6138609-1       line.C4_ln6138609-1  1 fusecurve=tlink  ratedcurrent=10
new fuse.C4_ln5712477-3       line.C4_ln5712477-3  1 fusecurve=tlink  ratedcurrent=10
new fuse.C4_ln5683833-1       line.C4_ln5683833-1  1 fusecurve=tlink  ratedcurrent=10
new fuse.C4_ln5955074-2       line.C4_ln5955074-2  1 fusecurve=tlink  ratedcurrent=10
new fuse.C4_ln6141147-1       line.C4_ln6141147-1  1 fusecurve=tlink  ratedcurrent=10
new fuse.C4_ln5532741-1       line.C4_ln5532741-1  1 fusecurve=tlink  ratedcurrent=10
new fuse.C4_ln81048102-4      line.C4_ln81048102-4  1 fusecurve=tlink  ratedcurrent=10
new fuse.C4_ln81048100-7      line.C4_ln81048100-7  1 fusecurve=tlink  ratedcurrent=10
new fuse.C4_ln5562961-1       line.C4_ln5562961-1 1 fusecurve=tlink  ratedcurrent=10
new fuse.C4_ln8979346-5       line.C4_ln8979346-5 1 fusecurve=tlink  ratedcurrent=10
new fuse.C4_ln8979344-4       line.C4_ln8979344-4 1 fusecurve=tlink  ratedcurrent=10
new fuse.C4_ln7061777-3       line.C4_ln7061777-3 1 fusecurve=tlink  ratedcurrent=10
new fuse.C4_ln5970852-1       line.C4_ln5970852-1 1 fusecurve=tlink  ratedcurrent=10
new fuse.C4_ln5928544-2       line.C4_ln5928544-2 1 fusecurve=tlink  ratedcurrent=10
new fuse.C4_ln6991377-9       line.C4_ln6991377-9 1 fusecurve=tlink  ratedcurrent=10
