new capacitor.C7_capbank2a  bus1=C7_r20185.1  kv=7.2  kvar=300  phases=1 conn=wye
new capacitor.C7_capbank2b  bus1=C7_r20185.2  kv=7.2  kvar=300  phases=1 conn=wye
new capacitor.C7_capbank2c  bus1=C7_r20185.3  kv=7.2  kvar=300  phases=1 conn=wye
new capacitor.C7_capbank1a  bus1=C7_r42247.1  kv=7.2  kvar=300  phases=1 conn=wye
new capacitor.C7_capbank1b  bus1=C7_r42247.2  kv=7.2  kvar=300  phases=1 conn=wye
new capacitor.C7_capbank1c  bus1=C7_r42247.3  kv=7.2  kvar=300  phases=1 conn=wye
new capacitor.C7_capbank0a  bus1=C7_r42246.1  kv=7.2  kvar=400  phases=1 conn=wye
new capacitor.C7_capbank0b  bus1=C7_r42246.2  kv=7.2  kvar=400  phases=1 conn=wye
new capacitor.C7_capbank0c  bus1=C7_r42246.3  kv=7.2  kvar=400  phases=1 conn=wye
new capacitor.C7_capbank3  bus1=C7_r18242  kv=12.47112  kvar=900  conn=wye
