new "transformer.C8_g_m1125934"  xhl=5.75  kva=1000  conns=[wye, delta]
~ wdg=1 bus=C8_190-7361.1.2.3.4  kv=12.47
~ wdg=2 bus=C8_g_190-7361        kv=0.48
new  reactor.C8_g_m1125934  phases=1  bus1=C8_190-7361.4  r=0.001  x=0  !neutral reactor/resistor
new   "generator.C8_g_m1125934"  bus1=C8_g_190-7361  kw=1000  pf=1  kva=1000  kv=0.48  xdp=0.27  xdpp=0.2  h=2
~ conn=delta   ! use the interconnection transformer to achieve wye for direct connect
new "monitor.C8_g_m1125934"      element="transformer.C8_g_m1125934"  terminal=1  mode=0
new "monitor.C8_g_m1125934_gen"  element="generator.C8_g_m1125934"    terminal=1  mode=3
